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# Vi lægger alle sandsynlighederne sammen og trækker dem fra 1.
Pr_0 := 1 - ((0.15*3) + 0.25 + 0.10) = 0.2
# Pr(x=0)=0.2
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n := [0, 1, 2, 3, 4, 5]
pr := [0.2, 0.15, 0.15, 0.15, 0.25, 0.10]
fx(x) := sum(pr)
# [plot: pr vs n]
# Find ud af hvordan du tegenr CDF
