# R=RFID IKKE DEFEKT
# Not_R=RFID DEFEKT
# S=System registrere ingen fejl
# Not_S=System registrere fejl
SGivenR := 0.4
NotSGivenNotR := 0.999
NotR := 1/100 = 0.01
# Pr(S|R)=0.4
# Pr(Not_S|Not_R)=0.999
SGivenNotR := 1 - NotSGivenNotR = 0.001
# 1 ud af 100 tags er defekte
# Pr(Not_R)=1/100
# a)
R := 1 - NotR = 0.99
# Sandsynligheden er 0.99
# b)
NotSGivenR := 1 - SGivenR = 0.6
S := (SGivenR*R) + SGivenNotR*NotR = 0.39601
NotS := 1 - S = 0.60399
# Den totale sandsynlighed er 0.604
# c)
# Bayesformel:
RGivenNotS := NotSGivenR*R/NotS = 0.98346
NotRGivenNotS := 1 - RGivenNotS = 0.01654
# pr(Not_R|Not_S)=0.017
# d)
RGivenNotS = 0.98346
# pr(R|Not_S)=0.983
# OPGAVE 2
K*(x^2 + 7) == 1 solve, K → 1/(x^2 + 7)
fx(x) :=
    if -1 < x < 1
        3/44*(x^2 + 7)
    else
        0
1/(x^2 + 7)*(x^2 + 7) → 1
3/44*(x^2 + 7) → 3*x^2/44 + 21/44
# [plot: fx(x) vs x]
integral(K*(x^2 + 7), x = -1 .. 1) == 1 solve, K → 3/44
EX := integral(x*fx(x), x = -∞ .. ∞) = 0
x := -1, 0 .. 5
EX2 := integral(x^2*fx(x), x = -∞ .. ∞) = 0.345455
var := EX2 - EX^2 = 0.345455
SD := sqrt(var) = 0.587754
Fx(x) := integral(3/44*(x^2 + 7), x = -1 .. x) → x^3/44 + 21*x/44 + 1/2
