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røde := 0.12
gule := 0.63
kaffeGivetRød := 0.59
chilliGivetBlå := 0.32
bådeGulogChilli := 0.15
# a) Hvis der tages en tilfældig Smartie fra leverancen, hvad er sandsynligheden for at den er blå?
blå := 1 - (gule + røde) = 0.25
# Sandsynligheden er 25%
# b) Hvor stor en procent-del af de røde har chili-smag?
# Vi bruger komplementærreglen. Hvis kaffe er det samme som den komplimentære af chilli kan vi trække den komplimentære af chilli fra 1 og finde chilli givet rød
notChilliGivetRød := kaffeGivetRød = 0.59
ChilliGivetRød := 1 - notChilliGivetRød = 0.41
# 41% procent er røde med chili-smag
# c) Hvor stor en procent-del af hele leverancen har chili-smag?
# multiplikationsreglen tages i brug
bådeChiliogBlå := chilliGivetBlå*blå = 0.08
bådeChiliogRød := ChilliGivetRød*røde = 0.0492
chilliIALT := bådeChiliogBlå + bådeChiliogRød + bådeGulogChilli = 0.2792
# 27.9% af leverencen har chilli-smag
# d) Hvis der med tilbagelægning udtages 8 tilfældige Smarties fra leverancen, hvad er sandsynligheden for, at der præcis 2 gange udtages en rød Smartie med chili-smag.
p := bådeChiliogRød = 0.0492
Pr(n, k) := n!/(k!*(n - k)!)*p^k*(1 - p)^(n - k)
To_Rød_og_Chilli_udaf_otte := Pr(8, 2) = 0.0500753
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# a) Find sandsynligheden 𝑃𝑟(2 < 𝑋 < 3). Vis hvordan resultatet er fremkommet.
# kigger vi på fordelings funktionen ser vi at den er anderledes for X=2 og X=3. Vi vil gerne finde X mellem de 2 værdier. Vi finder derfor delta
FX(x) :=
    if x < 1
        0
    if 1 ≤ x < 2.5
        1/2*x - 1/2
    if 2.5 ≤ x < 5
        3/4
    if 5 ≤ x < 6
        1/4*x - 1/2
    if 6 ≤ x
        1
fx(x) :=
    if 1 ≤ x < 2.5
        1/2
    if 5 ≤ x < 6
        1/4
    else
        0
FX(2) = 0.5
FX(3) = 0.75
FX(3) - FX(2) = 0.25
# Sandsynligheden for 𝑃𝑟(2 < 𝑋 < 3) er 0.25%
# b) Vis, hvordan fordelingsfunktionen 𝐹𝑋 (𝑥) for den stokastiske variabel 𝑋 kan findes ud fra tæthedsfunktionen 𝑓𝑋 (𝑥). Skitsér desuden grafen for fordelingsfunktionen 𝐹𝑋 (𝑥).
# for at finde fordelings funktionen skal man tage integralet af tæthedsfunktionen fra minus uendelig til den ønskede værdi, afhængig af hvilket interval man ønsker at finde fordelingsfunktionen for.
FX(x) == integral(fx(x), x = -∞ .. x)
FX(x) == integral(0, x = -∞ .. x) == 0  # x<1
FX(x) == integral(fx(x), x = -∞ .. 1) + integral(fx(x), x = 1 .. x) == integral(0, x = -∞ .. x) + integral(1/2, x = 1 .. x) == 0 + 1/2*x - 1/2  # 1<=x<2.5
# ....
# dette fortsætter til alle CDF'en for alle intervalerne er fundet
# [plot: FX(x) vs x]
# c) Find middelværdien og variansen for 𝑋. Vis med mellemregninger hvordan resultatet er fremkommet.
EX == integral(x*fx(x), x = -∞ .. ∞)
EX == integral(x*1/2, x = 1 .. 2.5) + integral(x*1/4, x = 5 .. 6)
integral(x*1/2, x = 1 .. 2.5) = 1.3125
integral(x*1/4, x = 5 .. 6) = 1.375
EX := 1.313 + 1.375
EX = 2.688
EX_2 == integral(x^2*1/2, x = 1 .. 2.5) + integral(x^2*1/4, x = 5 .. 6)
integral(x^2*1/2, x = 1 .. 2.5) = 2.4375
integral(x^2*1/4, x = 5 .. 6) = 7.58333
EX_2 := 2.438 + 7.583
EX_2 = 10.021
VAR := EX_2 - EX^2 = 2.79566
# Middelværdien er 2.688 og variansen er 2.796
# d) Hvad er sandsynlighederne for 𝑃𝑟(2) og 𝑃𝑟(6). Argumentér ud fra enten tæthedsfunktionen eller fordelingsfunktionen.
# Når der er tale om Pr(2) eller Pr(6) er det en anden måde at skrive Pr(x=2) og Pr(x=6)
# Ud fra plottet i opgave 2b) kan vi se at vores funktion er kontinueret
FX(2) = 0.5
FX(6) = 1
fx(2) = 0
fx(6) = 0
