f_XY(x, y) :=
    if x == -1
        if y == 1
            1/20
        if y == 2
            3/20
        if y == 3
            2/20
        if y == 4
            0
    if x == 0
        if y == 1
            0
        if y == 2
            2/20
        if y == 3
            3/20
        if y == 4
            1/20
    if x == 1
        if y == 1
            4/20
        if y == 2
            1/20
        if y == 3
            1/20
        if y == 4
            2/20
f_X(x) := sum(f_XY(x, y), y = 1 .. 4)
f_Y(y) := sum(f_XY(x, y), x = -1 .. 1)
f_Y(1) = 0.25
f_X(-1) = 0.3
f_Y(2) = 0.3
f_X(0) = 0.3
f_Y(3) = 0.3
f_X(1) = 0.4
f_Y(4) = 0.15
f_X(-1) + f_X(0) + f_X(1) = 1
f_Y(1) + f_Y(2) + f_Y(3) + f_Y(4) = 1
sum(f_X(x), x = -1 .. 1) = 1
sum(f_Y(y), y = 1 .. 4) = 1
# Den er OK fordi den er 1 | Den er OK fordi den er 1
sum(x*f_X(x), x = -1 .. 1) = 0.1
sum(y*f_Y(y), y = 1 .. 4) = 2.35
# middelværdi | middelværdi
A == (X ≤ 0)
B == (Y ≥ 3)
C == (X ≤ 0*{
    Y ≥ 3
})
Pr_A∩B := f_XY(-1, 3) + f_XY(-1, 4) + f_XY(0, 3) + f_XY(0, 4) = 0.3  # <-Bayes regel
Pr_B := f_Y(3) + f_Y(4) = 0.45
Pr_C := Pr_A∩B/Pr_B = 0.666667
