k*(2 - 2*e^(-1/2*∞)) == 1 solve, k → 1/2
FX(x) := 1/2*(2 - 2*e^(-1/2*x))
fx(x) := d/dx(FX(x)) → e^(-x/2)/2
# [plot: fx(x) vs x]
FX(2) - FX(1) = 0.238651
(2 - 0)/2 = 1
cos*(2*π*t)
EX := integral(x*fx(x), x = 0 .. ∞) = 2
t := [-2, -1, 0, 1, 2]
4/12 = 0.333333
cos(2*π*t)
1/6 = 0.166667
0.90*0.85 + 0.20*0.15 = 0.795
85%*1000 = 850
vægt := [10, 20, 30, 40, 50, 60, 70, 80, 90, 100]
spænding := [3.11, 5.68, 9.41, 11.58, 15.42, 18.18, 20.87, 24.25, 26.58, 30.42]
# [plot: spænding vs vægt]
μ_v := 1/10*sum(vægt) = 55
μ_s := 1/10*sum(spænding) = 16.55
N := 10
β := sum((vægt[0, i] - μ_v)*(spænding[0, i] - μ_s), i = 0 .. N - 1)/sum((vægt[0, i] - μ_v)^2, i = 0 .. N - 1) = 0.301164
α := μ_s - μ_v*β = -0.014
spænding(vægt) := α + β*vægt
# [plot: spænding(vægt) vs vægt]
t_0 := qt(0.975, N - 2) = 2.306
ε := spænding(vægt) - (α + β*vægt) = [0, 0, 0, 0, 0, 0, 0, 0, 0, 0]
Sr := 1/(N - 2)*sum(vægt[0, i] - spænding(vægt[0, 1]), i = 0 .. N - 1) = 61.2384
β_minus := β - t_0*Sr/□  # error: Missing term or expression.
