Fx(x) := 1/2*(1 + (x - 6)/10 + 1/π*sin(π*(x - 6)/10))
Pr(X > 5) == 1 - Pr(X < 5) == 1 - Fx(5)
1 - Fx(5) = 0.599182
Fx(5) = 0.400818
f(x) := d/dx(Fx(x)) → cos(π*(x - 6)/10)/20 + 1/20
# [plot: f(x) vs x]
EX := integral(x*f(x), x = -4 .. 16) = 6
EX2 := integral(x^2*f(x), x = -4 .. 16) = 49.0691
EX^2 = 36
EX2 - EX^2 = 13.0691
OPG3
EXn := -(2*0.2) + 0 = -0.4
VARx := (-1)^2*(2*0.2*(1 - 0.2)) + 2 = 2.32
-2*0.2*(1 - 0.2) = -0.32
-1*0.32 + 2 = 1.68
muy := 1962.5
mun := 1105.1
beta := 28.6794
alpha := mun - beta*muy → -55178.2225
year := [1955, 1956, 1957, 1958, 1959, 1960, 1961, 1962, 1963, 1964, 1965, 1966, 1967, 1968, 1969, 1970]
num := [856, 872, 876, 966, 1038, 1093, 1111, 1149, 1212, 1120, 1165, 1207, 1149, 1219, 1308, 1322]
N(y) := alpha + beta*y → 28.6794*y - 55178.2225
y := 1955, 1956 .. 1970
# [plot: N(y) vs y]
