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# Hvis man gerne vil finde den værdi der skal bruges til intervalet af en normalfordeling skal det slåes op i en tabel. Den fundende værdi skal divideres med 1 som set til venstre.
Φ^-1 → 1/Φ
X_Estimate := 35.8  # <-- samplemean
X_Estimate_Expression == (sum(x_1), x_2 .. x_n)/n
S_Squared := 12.5  # <--samplevarians
S_Squared_Expression == 1/(n - 1)*(sum(X_k^2, k = 1 .. n) - n*X_Estimate)
(X_Estimate - EX)/sqrt(1/n) → -(EX - 35.8)/sqrt(1/n)
# 90% konfindens interval:
1 - 0.90 = 0.1
0.1/2 = 0.05  # <-- de 10% skal opdeles i 2 da vi skal finde max og min
# Slår vi 0.05 op i en tabel får vi 0.5199.
1/0.5199 = 1.92345
# vi har nu en sandsynlighed der lyder således
P(-1.923 ≤ -(EX - 35.8)/sqrt(1/n) ≤ 1.923) == 0.90
# VI kan refaktorer og få det til at stå således
P(35.8 - 1.923/sqrt(n) ≤ EX ≤ 35.8 + 1.923/sqrt(n)) == 0.90
# Udfra dette kan vi skrive et interval op
[pointEstimator_min, ;, pointEstimator_max] == [35.8 - 1.923/sqrt(n), ;, 35.8 + 1.923/sqrt(n)]
# Dette interval fortæller os at hvis vores Mean(EX)
# Ligger imellem de 2 værdier, kan vi med 90% sandsnylighed sige at vores sample værdier altid vil ligge der imellem
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